** Same unit cube, but wrapped in a full analysis deck. The parser must yield
** the SAME mesh as single_hex.inp/.blk by ignoring every analysis keyword.
*HEADING
Unit cube with an analysis step that must be ignored
*NODE
1, 0.0, 0.0, 0.0
2, 1.0, 0.0, 0.0
3, 1.0, 1.0, 0.0
4, 0.0, 1.0, 0.0
5, 0.0, 0.0, 1.0
6, 1.0, 0.0, 1.0
7, 1.0, 1.0, 1.0
8, 0.0, 1.0, 1.0
*ELEMENT, TYPE=C3D8, ELSET=CUBE
1, 1, 2, 3, 4, 5, 6, 7, 8
*NSET, NSET=BOTTOM
1, 2, 3, 4
*SOLID SECTION, ELSET=CUBE, MATERIAL=STEEL
*MATERIAL, NAME=STEEL
*ELASTIC
210000.0, 0.3
*BOUNDARY
1, 1, 3, 0.0
*STEP
*STATIC
1.0, 1.0
*CLOAD
7, 3, -100.0
*END STEP
